**
** Heading +++++++++++++++++++++++++++++++++++++++++++++++++
**
*Heading
Hash: SydmOSQI, Date: 04/18/2026, Unit system: UNIT_LESS
**
** Nodes +++++++++++++++++++++++++++++++++++++++++++++++++++
**
*Node
1, 0.00000000E+000, 0.00000000E+000, 0.00000000E+000
2, 1.00000000E+000, 0.00000000E+000, 0.00000000E+000
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**
** Elements ++++++++++++++++++++++++++++++++++++++++++++++++
**
*Element, Type=C3D8, Elset=Solid_part-1
1, 1, 2, 3, 4, 562, 572, 582, 592
2, 562, 572, 582, 592, 563, 573, 583, 593
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**
** Node sets +++++++++++++++++++++++++++++++++++++++++++++++
**
*Nset, Nset=Group_1
100, 101, 102, 103, 104, 105, 106, 107, 108, 109, 110
*Nset, Nset=Group_2
454, 455, 456, 457, 458, 459, 460, 461, 462, 463, 464
*Nset, Nset=Group_3
3321, 3331, 3341, 3351, 3361, 3371, 3381, 3391, 3401, 3411, 3421
*Nset, Nset=Layer1_fromEl
570, 571, 580, 581, 590, 591
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*Nset, Nset=Layer4_fromEl
564, 565, 566, 567, 568, 574
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*Nset, Nset=Layer2_fromEl
569, 570, 579, 580, 589, 590
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**
** Element sets ++++++++++++++++++++++++++++++++++++++++++++
**
*Elset, Elset=Layer1
10, 20, 30, 40, 50, 60
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*Elset, Elset=Layer4
4, 5, 6, 7, 14, 15
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*Elset, Elset=Layer2
9, 19, 29, 39, 49, 59
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*Elset, Elset=Layer3
8, 18, 28, 38, 48, 58
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*Elset, Elset=Layer7
1, 11, 21, 31, 41, 51
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*Elset, Elset=Layer6
2, 12, 22, 32, 42, 52
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*Elset, Elset=Layer5
3, 13, 23, 33, 43, 53
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**
** Surfaces ++++++++++++++++++++++++++++++++++++++++++++++++
**
**
** Physical constants ++++++++++++++++++++++++++++++++++++++
**
**
** Coordinate systems ++++++++++++++++++++++++++++++++++++++
**
**
** Materials +++++++++++++++++++++++++++++++++++++++++++++++
**
*Material, Name=Material-1
*Elastic
100000, 0.4
*Material, Name=Material-2
*Elastic
5000, 0.3
**
** Sections ++++++++++++++++++++++++++++++++++++++++++++++++
**
*Solid section, Elset=Layer1, Material=Material-1
*Solid section, Elset=Layer2, Material=Material-2
*Solid section, Elset=Layer3, Material=Material-1
*Solid section, Elset=Layer4, Material=Material-2
*Solid section, Elset=Layer5, Material=Material-1
*Solid section, Elset=Layer6, Material=Material-2
*Solid section, Elset=Layer7, Material=Material-1
**
** Pre-tension sections ++++++++++++++++++++++++++++++++++++
**
**
** Constraints +++++++++++++++++++++++++++++++++++++++++++++
**
**
** Surface interactions ++++++++++++++++++++++++++++++++++++
**
**
** Contact pairs +++++++++++++++++++++++++++++++++++++++++++
**
**
** Amplitudes ++++++++++++++++++++++++++++++++++++++++++++++
**
**
** Initial conditions ++++++++++++++++++++++++++++++++++++++
**
**
** Steps +++++++++++++++++++++++++++++++++++++++++++++++++++
**
**
** Step-1 ++++++++++++++++++++++++++++++++++++++++++++++++++
**
*Step
*Static, Solver=spooles
**
** Controls ++++++++++++++++++++++++++++++++++++++++++++++++
**
**
** Output frequency ++++++++++++++++++++++++++++++++++++++++
**
**
** Boundary conditions +++++++++++++++++++++++++++++++++++++
**
*Boundary, op=New
** Name: Displacement_Rotation-1
*Boundary
Group_1, 2, 2, 0
Group_1, 3, 3, 0
** Name: Displacement_Rotation-2
*Boundary
Group_2, 2, 2, 0
Group_2, 3, 3, 0
** Name: Displacement_Rotation-3
*Boundary
Group_3, 1, 2, 0
**
** Loads +++++++++++++++++++++++++++++++++++++++++++++++++++
**
*Cload, op=New
*Dload, op=New
** Name: Concentrated_Force-1
*Cload
Group_3, 3, -9.090909
**
** Defined fields ++++++++++++++++++++++++++++++++++++++++++
**
**
** History outputs +++++++++++++++++++++++++++++++++++++++++
**
**
** Field outputs +++++++++++++++++++++++++++++++++++++++++++
**
*Node file
RF, U
*El file
S, E, NOE
**
** End step ++++++++++++++++++++++++++++++++++++++++++++++++
**
*End step
