**
** Heading +++++++++++++++++++++++++++++++++++++++++++++++++
**
*Heading
Hash: ZlbBQ8vP, Date: 04/17/2026, Unit system: UNIT_LESS
**
** Nodes +++++++++++++++++++++++++++++++++++++++++++++++++++
**
*Node
1, 0.00000000E+000, 0.00000000E+000, 0.00000000E+000
2, 1.00000000E+000, 0.00000000E+000, 0.00000000E+000
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**
** Elements ++++++++++++++++++++++++++++++++++++++++++++++++
**
*Element, Type=S8R, Elset=beam
1, 1, 4, 3, 2, 562, 563, 564, 565
2, 4, 6, 5, 3, 566, 567, 568, 563
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**
** Node sets +++++++++++++++++++++++++++++++++++++++++++++++
**
*Nset, Nset=sup1
100, 101, 102, 103, 104, 105, 106, 107, 108, 109, 110
*Nset, Nset=sup2
454, 455, 456, 457, 458, 459, 460, 461, 462, 463, 464
*Nset, Nset=load1
266, 267, 268, 269, 270, 271, 272, 273, 274
*Nset, Nset=load2
265, 275
*Nset, Nset=Group_fromEl
1, 2, 3, 4, 5, 6
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**
** Element sets ++++++++++++++++++++++++++++++++++++++++++++
**
*Elset, Elset=Group
1, 2, 3, 4, 5, 6
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*Elset, Elset=internal
1, 2, 3, 4, 5, 6
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**
**
**
** Physical constants ++++++++++++++++++++++++++++++++++++++
**
**
** Coordinate systems ++++++++++++++++++++++++++++++++++++++
**
**
** Materials +++++++++++++++++++++++++++++++++++++++++++++++
**
**
** Materials +++++++++++++++++++++++++++++++++++++++++++++++
**
*Material, Name=Material-1
*Elastic, TYPE=ENGINEERING CONSTANTS
0.10000E+06,0.50000E+04,0.50000E+04,0.40000E+00,0.30000E+00,0.30000E+00,0.30000E+04,0.20000E+04
0.20000E+04,
*Material, Name=Material-2
*Elastic, TYPE=ENGINEERING CONSTANTS
0.50000E+04,0.10000E+06,0.50000E+04,0.40000E+00,0.30000E+00,0.30000E+00,0.30000E+04,0.20000E+04
0.20000E+04,
**
** Sections ++++++++++++++++++++++++++++++++++++++++++++++++
**
*Shell section, Elset=beam, composite
.1,,Material-1
.1,,Material-2
.1,,Material-1
.4,,Material-2
.1,,Material-1
.1,,Material-2
.1,,Material-1
**
** Pre-tension sections ++++++++++++++++++++++++++++++++++++
**
**
** Constraints +++++++++++++++++++++++++++++++++++++++++++++
**
**
** Surface interactions ++++++++++++++++++++++++++++++++++++
**
**
** Contact pairs +++++++++++++++++++++++++++++++++++++++++++
**
**
** Amplitudes ++++++++++++++++++++++++++++++++++++++++++++++
**
**
** Initial conditions ++++++++++++++++++++++++++++++++++++++
**
**
** Steps +++++++++++++++++++++++++++++++++++++++++++++++++++
**
**
** Step-1 ++++++++++++++++++++++++++++++++++++++++++++++++++
**
*Step
*Static, Solver=Spooles
**
** Controls ++++++++++++++++++++++++++++++++++++++++++++++++
**
**
** Output frequency ++++++++++++++++++++++++++++++++++++++++
**
**
** Boundary conditions +++++++++++++++++++++++++++++++++++++
**
*Boundary, op=New
** Name: Displacement_Rotation-1
*Boundary
sup1, 2, 2, 0
sup1, 3, 3, 0
** Name: Displacement_Rotation-2
*Boundary
sup2, 2, 2, 0
sup2, 3, 3, 0
** Name: Displacement_Rotation-3
*Boundary
load1, 1, 1, 0
**
** Loads +++++++++++++++++++++++++++++++++++++++++++++++++++
**
*Cload, op=New
*Dload, op=New
** Name: Concentrated_Force-1
*Cload
load1, 3, -10
** Name: Concentrated_Force-2
*Cload
load2, 3, -5
**
** Defined fields ++++++++++++++++++++++++++++++++++++++++++
**
**
** History outputs +++++++++++++++++++++++++++++++++++++++++
**
**
** Field outputs +++++++++++++++++++++++++++++++++++++++++++
**
*Node file
RF, U
*El file
S, E, NOE
**
** End step ++++++++++++++++++++++++++++++++++++++++++++++++
**
*End step
